**
** ABAQUS Input Deck Generated by HyperMesh Version  : 12.0.0.85
** Generated using HyperMesh-Abaqus Template Version : 12.0
**
**   Template:  ABAQUS/STANDARD 3D
**
*NODE,NSET=nall
         1,  265.3681       ,  -743.52        ,  1328.652
         2,  283.5191       ,  -750.5         ,  1100.362
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**HWCOLOR COMP          1    17
*ELEMENT,TYPE=S3,ELSET=XBN3_200D01_AA_1p0mm_DCO3
         1,      3009,      3006,      3010
         2,      3008,      3009,      3011
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**HWCOLOR COMP          1    17
*ELEMENT,TYPE=S4R,ELSET=XBN3_200D01_AA_1p0mm_DCO3
       120,      2632,      1213,      3056,      2990
       121,      2990,      2991,      3061,      3040
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**HWNAME COMP          2 rb2
**HWCOLOR COMP          2     6
*COUPLING, REF NODE=3062, CONSTRAINT NAME=HM_coupkin_2937, SURFACE=HM_coupkin_surface_2937
*KINEMATIC
1,6
*SURFACE, NAME = HM_coupkin_surface_2937, TYPE = NODE
       108, 1
       877, 1
      1804, 1
      1838, 1
      1883, 1
      1993, 1
      2010, 1
      2110, 1
*COUPLING, REF NODE=3063, CONSTRAINT NAME=HM_coupkin_2938, SURFACE=HM_coupkin_surface_2938
*KINEMATIC
1,6
*SURFACE, NAME = HM_coupkin_surface_2938, TYPE = NODE
       734, 1
       735, 1
       736, 1
       740, 1
       860, 1
       861, 1
       862, 1
       863, 1
*COUPLING, REF NODE=3064, CONSTRAINT NAME=HM_coupkin_2939, SURFACE=HM_coupkin_surface_2939
*KINEMATIC
1,6
*SURFACE, NAME = HM_coupkin_surface_2939, TYPE = NODE
       104, 1
       120, 1
       865, 1
       866, 1
       874, 1
      1878, 1
**HMASSEM       1       3 BN3 00004 AA
**HMASSEM_ASSEM_ID             2
**HMASSEM       2      29 BN3 20011 AA
**HMASSEM_ASSEM_ID             3
**HMASSEM       3      40 BN3 20055 AA
**HMASSEM_ASSEM_ID             4
**HMASSEM       4      41 BN3 20002 AA
**HMASSEM_COMP_ID              1
**HMASSEM       5       3 BN3 00001 AA
**HMASSEM_ASSEM_ID             1
**HMASSEM       6      40 BIW_PPL
**HMASSEM_COMP_ID              1
**HMASSEM       7       4 biw
**HMASSEM_ASSEM_ID             5       6
**HM_comp_by_property "XBN3_200D01_AA_1p0mm_DCO3"    24
*SHELL SECTION, ELSET=XBN3_200D01_AA_1p0mm_DCO3, MATERIAL=XBN3_200D01_AA_1p0mm_DCO3
1.0       ,
**HM_comp_by_property "XBN3_200D01_AA_1p0mm_DCO3"    24
*SHELL SECTION, ELSET=rb2, MATERIAL=XBN3_200D01_AA_1p0mm_DCO3
1.0       ,
*MATERIAL, NAME=XBN3_200D01_AA_1p0mm_DCO3
*DENSITY
7.8000E-09,0.0
*ELASTIC, TYPE = ISOTROPIC
206800.0  ,0.3       ,0.0
*PLASTIC
143.374911,0.0       ,0.0
150.765981,3.0304E-04,0.0
158.679699,5.4668E-04,0.0
169.522804,0.00117074,0.0
177.957854,0.00241327,0.0
183.859369,0.00369099,0.0
195.153831,0.00739188,0.0
205.779498,0.01149434,0.0
232.433496,0.01778686,0.0
240.713494,0.02194697,0.0
248.248319,0.02607327,0.0
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420.0     ,1.0       ,0.0
**HMNAME LOADSTEP          1 Modal
*STEP
*FREQUENCY, EIGENSOLVER = LANCZOS
        20,,,,,
**HWNAME LOADCOL          1 spc
**HWCOLOR LOADCOL          1    11
*BOUNDARY
      3062,1,6,0.0
      3063,1,6,0.0
      3064,1,6,0.0
*OUTPUT, FIELD
*NODE OUTPUT
U,
*END STEP
*****
